U := 3.3*V
I_uc := 6*mA
t_uc := 120*s
I_lora := 120*mA
t_lora := 30*s
I_co2 := 7*mA
t_co2 := 60*s
E_load := U*(I_uc*t_uc + I_lora*t_lora + I_co2*t_co2) = 15.642 J
C_sc := 1*F
U_sc := 5 V
E_sc := 1*C_sc*U_sc^2/2 = 12.5 J
